*HEADING
Cantilever beam reference: N, mm, s, tonne
*NODE
1, 0, 0, 0
2, 25, 0, 0
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*ELEMENT, TYPE=B31, ELSET=BODY
1, 1, 2
2, 2, 3
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*NSET, NSET=FIXED
1
*NSET, NSET=TIP
41
*BEAM SECTION, SECTION=RECT, ELSET=BODY, MATERIAL=STEEL
10, 10
0, 0, -1
*MATERIAL, NAME=STEEL
*ELASTIC
210000, 0.3
*DENSITY
7.85e-9
*BOUNDARY
FIXED, 1, 6
*STEP, NAME=Load
*STATIC
*CLOAD
TIP, 2, -1
*OUTPUT, FIELD
*NODE OUTPUT
U, RF
*ELEMENT OUTPUT
S, E
*END STEP
