*HEADING
Axial rod reference: N, mm, s, tonne
*NODE
1, 0, 0, 0
2, 100, 0, 0
*ELEMENT, TYPE=T3D2, ELSET=BODY
1, 1, 2
*NSET, NSET=FIXED
1
*NSET, NSET=TIP
2
*SOLID SECTION, ELSET=BODY, MATERIAL=STEEL
10
*MATERIAL, NAME=STEEL
*ELASTIC
210000, 0.3
*BOUNDARY
FIXED, 1, 3
TIP, 2, 3
*STEP, NAME=Load
*STATIC
*CLOAD
TIP, 1, {{LOAD}}
*OUTPUT, FIELD
*NODE OUTPUT
U, RF
*ELEMENT OUTPUT
S, E
*END STEP
