*HEADING
Shell membrane reference, section point selection
*NODE
1, 0, 0, 0
2, 100, 0, 0
3, 100, 10, 0
4, 0, 10, 0
*ELEMENT, TYPE=S4R, ELSET=BODY
1, 1, 2, 3, 4
*NSET, NSET=ALLNODES
1, 2, 3, 4
*NSET, NSET=LEFT
1, 4
*NSET, NSET=RIGHT
2, 3
*SHELL SECTION, ELSET=BODY, MATERIAL=STEEL
1, 5
*MATERIAL, NAME=STEEL
*ELASTIC
210000, 0
*BOUNDARY
ALLNODES, 2, 6
LEFT, 1, 1
*STEP, NAME=Load
*STATIC
*BOUNDARY
RIGHT, 1, 1, 0.01
*OUTPUT, FIELD
*NODE OUTPUT
U, RF
*ELEMENT OUTPUT
S, E
*END STEP
